# Initialize simulation
atom_style	atomic
units		metal
read_data	after_md_32.data

mass		1 58.6934
mass        2 58.933195
mass        3 47.867
mass        4 91.224
mass        5 178.4899999

pair_style	snap
pair_coeff	* * ../../../potentials/HEA_var8.snapcoeff ../../../potentials/HEA_var8.snapparam Ni Co Ti Zr Hf

###################################################
variable	target_T equal 900

neighbor        1.0 bin
neigh_modify    every 5 delay 0 check yes

variable	lenx equal lx
variable	leny equal ly
variable	lenz equal lz
variable	strxx equal pxx
variable	stryy equal pyy
variable	strzz equal pzz


###########################################
variable	init_lx equal 130.759338060534
variable	del_x equal ${init_lx}*(-0.0002)   # -0.0002
variable	comp_loop loop 41   # 41
reset_timestep	0
print		"strain  stressx  stressy  stressz  " file SS_curve_var8_69120_12345678_900_2.txt
dump		1 all custom 1000 compress_dump_var8_69120_12345678_900_2.cfg id type x y z
label		compress

change_box	all x delta 0 ${del_x} remap units box
variable        strain equal 1-$(lx)/${init_lx}
thermo_style	custom step temp pe pxx pyy pzz lx ly lz v_strain
fix		1 all npt temp ${target_T} ${target_T} 0.1 y 0.0 0.0 1.0 z 0.0 0.0 1.0
fix		2 all ave/time 10 100 10000 v_strxx v_stryy v_strzz
run 		10000
unfix		1
variable	ave_stressx equal f_2[1]*1E-4
variable	ave_stressy equal f_2[2]*1E-4
variable	ave_stressz equal f_2[3]*1E-4
print		"${strain} ${ave_stressx} ${ave_stressy} ${ave_stressz} " append SS_curve_var8_69120_12345678_900_2.txt
unfix		2
write_data 	after_md_${comp_loop}_2.data nocoeff
next		comp_loop
jump		in.compress.NiCoTiZrHf.var8_69120_12345678_900 compress
undump		1
