atom_style      atomic
units           metal
boundary        p p p
read_data       perfect_B2.lmp

mass     1 58.6934
mass     2 58.933195
mass     3 47.867
mass     4 91.224
mass     5 178.49

pair_style      snap
pair_coeff      * * ../../../../../potentials/HEA_v3_trial3.snapcoeff ../../../../../potentials/HEA_v3_trial3.snapparam Ni Co Ti Zr Hf
neighbor        1.0 bin
neigh_modify    every 5 delay 0 check yes
thermo		100

variable	full_bg equal $(lx)/30
variable	half_bg equal ${full_bg}*0.5
variable	bulk_lx equal 51.961524230000002*3
variable	bulk_ly equal 51.439284600000001*1
variable	bulk_lz equal 50.911688249999997*3

variable 	del_zhi equal $(lz)*0.5
variable 	del_xlo equal $(lx)*0.5-${full_bg}-${full_bg}-${full_bg}-${half_bg}+0.1
variable 	del_xhi equal $(lx)*0.5-${full_bg}-${full_bg}-${half_bg}+0.1
region 		del block ${del_xlo} ${del_xhi} INF INF $(zlo) ${del_zhi} units box
region 		regL block 0 ${del_xlo} INF INF $(zlo) ${del_zhi} units box
region 		regR block ${del_xhi} $(lx) INF INF $(zlo) ${del_zhi} units box
group 		del region del
group 		regL region regL
group 		regR region regR

delete_atoms    group del
reset_atoms     id sort yes
write_data      Btemp1.data nocoeff

displace_atoms  regL ramp x 0 ${half_bg} x $(xlo) ${del_xlo} units box
displace_atoms  regR ramp x -${half_bg} 0 x ${del_xhi} $(xhi) units box

change_box      all x final 0 ${bulk_lx} y final 0 ${bulk_ly} z final 0 ${bulk_lz} remap units box
write_data      Btemp2.data nocoeff

minimize        0.0 0.02 5000 10000
write_data      HEA_init_edge1.data nocoeff

clear
###############################################

atom_style      atomic
units           metal
boundary        p p p
read_data       perfect_B2.lmp

mass     1 58.6934
mass     2 58.933195
mass     3 47.867
mass     4 91.224
mass     5 178.49

pair_style      snap
pair_coeff      * * ../../../../../potentials/HEA_v3_trial3.snapcoeff ../../../../../potentials/HEA_v3_trial3.snapparam Ni Co Ti Zr Hf
neighbor        1.0 bin
neigh_modify    every 5 delay 0 check yes
thermo          100

variable        full_bg equal $(lx)/30
variable        half_bg equal ${full_bg}*0.5
variable        bulk_lx equal 51.961524230000002*3
variable        bulk_ly equal 51.439284600000001*1
variable        bulk_lz equal 50.911688249999997*3

variable        del_zhi equal $(lz)*0.5
variable 	del_xlo equal $(lx)*0.5+${half_bg}+${full_bg}+0.1
variable 	del_xhi equal $(lx)*0.5+${full_bg}+${full_bg}+${half_bg}+0.1
region          del block ${del_xlo} ${del_xhi} INF INF $(zlo) ${del_zhi} units box
region          regL block 0 ${del_xlo} INF INF $(zlo) ${del_zhi} units box
region          regR block ${del_xhi} $(lx) INF INF $(zlo) ${del_zhi} units box
group           del region del
group           regL region regL
group           regR region regR

delete_atoms    group del
reset_atoms     id sort yes
write_data      Atemp1.data nocoeff

displace_atoms  regL ramp x 0 ${half_bg} x $(xlo) ${del_xlo} units box
displace_atoms  regR ramp x -${half_bg} 0 x ${del_xhi} $(xhi) units box

change_box      all x final 0 ${bulk_lx} y final 0 ${bulk_ly} z final 0 ${bulk_lz} remap units box
dump            1 all custom 1 dump_after.cfg id type x y z
run             0
undump          1
delete_atoms    group all
read_data       Btemp2.data add append
read_dump       dump_after.cfg 0 x y z box yes replace yes
write_data      Atemp2.data nocoeff

minimize        0.0 0.02 5000 10000
dump            1 all custom 1 dump_neb_product.cfg id type x y z
dump_modify     1 sort id
run             0
undump          1
write_data      HEA_init_edge2.data nocoeff
