atom_style      atomic
units           metal
boundary        p p p
read_data       ../HEA_init_edge1.data

mass     1 58.6934
mass     2 58.933195
mass     3 47.867
mass     4 91.224
mass     5 178.49

pair_style      snap
pair_coeff      * * ../../../../../../../potentials/HEA_v3_trial3.snapcoeff ../../../../../../../potentials/HEA_v3_trial3.snapparam Ni Co Ti Zr Hf
neighbor        1.0 bin
neigh_modify    every 5 delay 0 check yes
thermo		100

variable	upp_zhi equal bound(all,zmax)
variable	upp_zlo equal ${upp_zhi}-8.0
variable	bot_zlo equal bound(all,zmin)
variable	bot_zhi equal ${bot_zlo}+8.0
region		fix_upp block EDGE EDGE EDGE EDGE ${upp_zlo} ${upp_zhi} units box
region		fix_bot block EDGE EDGE EDGE EDGE ${bot_zlo} ${bot_zhi} units box
region		constrain union 2 fix_upp fix_bot
group		constrain region constrain
group	    mobile subtract all constrain
fix		f constrain setforce NULL NULL 0
velocity	all create 300 123456 dist gaussian mom yes rot yes
fix		1 mobile nvt temp 300 300 0.1 x 0.0 0.0 1.0 y 0.0 0.0 1.0
timestep        0.001
run             10000
unfix   1
minimize	0.0 0.02 5000 1000

#fix				1 mobile tfmc 0.1 100 30678
#run				50000
#unfix			1
#minimize	0.0 0.02 5000 10000

write_data	HEA_opt_edge1.data nocoeff

clear
###############################################

atom_style      atomic
units           metal
boundary        p p p
read_data       ../HEA_init_edge3.data

mass     1 58.6934
mass     2 58.933195
mass     3 47.867
mass     4 91.224
mass     5 178.49

pair_style      snap
pair_coeff      * * ../../../../../../../potentials/HEA_v3_trial3.snapcoeff ../../../../../../../potentials/HEA_v3_trial3.snapparam Ni Co Ti Zr Hf
neighbor        1.0 bin
neigh_modify    every 5 delay 0 check yes
thermo		100

variable	upp_zhi equal bound(all,zmax)
variable	upp_zlo equal ${upp_zhi}-8.0
variable	bot_zlo equal bound(all,zmin)
variable	bot_zhi equal ${bot_zlo}+8.0
region		fix_upp block EDGE EDGE EDGE EDGE ${upp_zlo} ${upp_zhi} units box
region		fix_bot block EDGE EDGE EDGE EDGE ${bot_zlo} ${bot_zhi} units box
region		constrain union 2 fix_upp fix_bot
group		constrain region constrain
group	    mobile subtract all constrain
fix		f constrain setforce NULL NULL 0
velocity	all create 300 123456 dist gaussian mom yes rot yes
fix		2 mobile npt temp 300 300 0.1 x 0.0 0.0 1.0 y 0.0 0.0 1.0
timestep        0.001
run             10000
unfix   2
minimize	0.0 0.02 5000 10000

#fix				2 mobile tfmc 0.1 100 30678
#run				50000
#unfix			2
#minimize	0.0 0.02 5000 10000

write_data	HEA_opt_edge2.data nocoeff

dump		1 all custom 1 final.cfg id x y z
dump_modify	1 sort id
run		0
