# Initialize simulation
atom_style	atomic
units		metal
read_data	../../../standard_model/random_x111_y112_z110_quad1/sample1/MD_900K/after_relax_bulk.data

replicate	3 1 1

mass            1 58.6934
mass            2 58.933195
mass            3 47.867
mass            4 91.224
mass            5 178.49

pair_style      snap
pair_coeff      * * ../../../../../../../../potentials/HEA_v8_trial2.snapcoeff ../../../../../../../../potentials/HEA_v8_trial2.snapparam Ni Co Ti Zr Hf

###################################################
variable	target_T equal 900

neighbor        1.0 bin
neigh_modify    every 5 delay 0 check yes

variable	lenx equal lx
variable	leny equal ly
variable	lenz equal lz
variable	strxx equal pxx
variable	stryy equal pyy
variable	strzz equal pzz

# Set up and run MD in NPT ensemble
timestep	0.001
neighbor	1.0 bin
neigh_modify	every 5 delay 0 check yes
thermo_style	custom step temp pe pxx pyy pzz lx ly lz
thermo		1000

reset_timestep	0
dump		1 all custom 5000 md_npt_dump.cfg id type x y z
fix		1 all npt temp ${target_T} ${target_T} 0.1 aniso 0 0 1.0
fix		avg all ave/time 10 1000 50000 v_lenx v_leny v_lenz
run		50000
undump		1
unfix		1
variable	newlx equal f_avg[1]
variable	newly equal f_avg[2]
variable	newlz equal f_avg[3]
change_box	all x final 0 ${newlx} y final 0 ${newly} z final 0 ${newlz} remap units box
unfix		avg
write_data	after_relax.data nocoeff

###########################################
variable	init_lx equal $(lx)
variable	del_x equal ${init_lx}*(-0.001)
variable	comp_loop loop 21
reset_timestep	0
print		"strain  stressx  stressy  stressz  " file SS_curve.txt
dump		1 all custom 5000 compress_dump.cfg id type x y z
label		compress
if		"${comp_loop} > 1" then &
		"change_box	all x delta 0 ${del_x} remap units box"
variable        strain equal 1-$(lx)/${init_lx}
thermo_style	custom step temp pe pxx pyy pzz lx ly lz v_strain
fix		1 all npt temp ${target_T} ${target_T} 0.1 y 0.0 0.0 1.0 z 0.0 0.0 1.0
fix		2 all ave/time 10 1000 50000 v_strxx v_stryy v_strzz
run 		50000
unfix		1
variable	ave_stressx equal f_2[1]*1E-4
variable	ave_stressy equal f_2[2]*1E-4
variable	ave_stressz equal f_2[3]*1E-4
print		"${strain} ${ave_stressx} ${ave_stressy} ${ave_stressz} " append SS_curve.txt
unfix		2
write_data 	after_md_${comp_loop}.data nocoeff
next		comp_loop
jump		in.compress.HEA compress
undump		1
